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# Рисунок 1 – Схема цепи
# Пользуясь средствами программы MathCad, решим систему уравнений метода узловых потенциалов. Для этого составим все необходимые матрицы:
# – Матрица соединений
A := [
    1, -1, 1, 0, 0, 0, 0, -1;
    0, 0, -1, 1, 0, 1, 0, 0;
    0, 0, 0, 0, 0, -1, 1, 1;
    -1, 1, 0, 0, -1, 0, 0, 0
]
# [См] – матрица проводимостей
G := [
    1/2000, 0, 0, 0, 0, 0, 0, 0;
    0, 1/3000, 0, 0, 0, 0, 0, 0;
    0, 0, 1/5000, 0, 0, 0, 0, 0;
    0, 0, 0, 1/6000, 0, 0, 0, 0;
    0, 0, 0, 0, 1/2000, 0, 0, 0;
    0, 0, 0, 0, 0, 1/9000, 0, 0;
    0, 0, 0, 0, 0, 0, 1/3000, 0;
    0, 0, 0, 0, 0, 0, 0, 1/1000
]
# [А] – Матрица источников токов | [В] – Матрица источников ЭДС
J := [0; 0; 0; 0; 0.003; 0; 0; 0]
E := [1; 0; 0; 0; 0; 0.5; 0; 0]
φ := [φ_1; φ_2; φ_3; φ_4]  # error: Эта переменная не определена. Проверьте правильность установки обозначения.  # [В] – Вектор-столбец потенциалов
# Воспользуемся блоком решения для нахождения потенциалов узлов:
solve block
    # guess values
    φ_1 := 0
    φ_2 := 0
    φ_3 := 0
    φ_4 := 0
    # constraints
    A*G*transpose(A)*[φ_1; φ_2; φ_3; φ_4] == A*(J + G*E)
    # solver
    find(φ_1, φ_2, φ_3, φ_4) = [-2.5819; -1.41446; -1.93474; -4.23869]
end solve block
# Собрем схему в программе схемотехнического моделирования MicroCap:
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# Рисунок 2 – Построение схемы в программе MicroCap
# С помощью анализа по постоянному току определим напряжения, силу тока и мощность на участках цепи:
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# Рисунок 3 – Анализ схемы в MicroCap
Power := 328.393*10^-6 + 418.824*10^-6 + 272.586*10^-6 + 45.701*10^-9 + 215.684*10^-6 + 914.98*10^-6 + 333.448*10^-6 - 1.127*10^-6 + 1.248*10^-3 - 12.716*10^-3 + 8.983*10^-3
□ - 1.127*10^-6 + 1.248*10^-3 - 12.716*10^-3 + 8.983*10^-3
Power = -2.1663e-6  # [Вт] – Баланс мощностей сходится
