A := [
    1, -1, 1, 0, 0, 0, 0, -1, 0;
    0, 0, -1, 1, 0, 1, 0, 0, 0;
    0, 0, 0, 0, 0, -1, 1, 1, 0;
    -1, 1, 0, 0, -1, 0, 0, 0, 1
]
φ := [φ1; φ2; φ3; φ4]  # error: Эта переменная не определена.
J := [0; 0; 0; 0; 0.003; 0; 0; 0; 0]
E := [1; 0; 0; 0; 0; 0.5; 0; 0; 0]
φ := □  # error: Пустой местозаполнитель.
