I_s0 := 8*10^-9
I_sr0 := 11*10^-6
I_kf := 0.15*10^-3
I_bv := 0.1*10^-9
NBV := 1.5
BV := 50
M := 0.5
NR := 1.3
N := 1.5
VJ := 0.75
R_s := 0.5
I(U) := I_s0*(e^(U/(N*0.026)) - 1)/sqrt(1 + I_s0/I_kf*(e^(U/(N*0.026)) - 1)) + I_sr0*((1 - U/VJ)^2 + 0.001)^(M/2)*(e^(U/(NR*0.026)) - 1)
U := 0, 0.001 .. 0.6
# [chart]
    Y[1] := I(U)
    X[1] := U + I(U)*R_s
# [chart]
    Y[1] := I(U)
    X[1] := U + I(U)*R_s
I(U) := I(U) - I_bv*e^(-(U + BV)/(NBV*0.026))
U := -55, -54.9 .. 0
# [chart]
    Y[1] := |I(U)*10^6|
    X[1] := U + I(U)*R_s
