a := READCSV("3.csv")
b := READCSV("АЧХ1.csv")
c := READCSV("3.csv")
d := READCSV("АЧХ2.csv")
d = [
    1, 1, 0, 2.40708, -8.84761e-7;
    1.01859, 1.01859, 0, 2.40708, -9.0121e-7;
    1.03753, 1.03753, 0, 2.40708, -9.17964e-7
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]
b = [
    1, 1, 0, -2.41084, -2.43982e-6;
    1.01859, 1.01859, 0, -2.41084, -2.37422e-6;
    1.03753, 1.03753, 0, -2.41084, -2.30942e-6
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]
# [chart]
    X[2] := c[:, 1]
    X[3] := a[:, 0]
    Y[2] := c[:, 2]
    Y[3] := a[:, 2]
# [chart]
    X[1] := b[:, 0]
    X[2] := d[:, 0]
    Y[1] := -b[:, 3]
    Y[2] := d[:, 3]
